// SBML level 3 version 2

model PFAS()
  // taxonomy:9443
  // model units - substance: MicroGM, time: DAY, volume: L

  // Compartments:
  compartment Lung; Lung has L;  // UBERON:0000479
  compartment Trans = 1e-7 L;
  compartment Sc = 1 L;  // UBERON:0002027
  compartment Ve; Ve has L;
  compartment Skin; Skin has L;  // UBERON:0002097
  compartment Ven_Plas; Ven_Plas has L;  // UBERON:0013756
  compartment Art_Plas; Art_Plas has L;  // UBERON:0013755
  compartment Gut; Gut has L;  // UBERON:0001555
  compartment Liv; Liv has L;  // UBERON:0002107
  compartment Fat; Fat has L;  // UBERON:0001013
  compartment Kid; Kid has L;  // UBERON:0002113
  compartment Fil; Fil has L;
  compartment Delay = 1 L;
  compartment Urine = 1 L;  // UBERON:0001088
  compartment Rest; Rest has L;

  // Species:
  substanceOnly species Alung in Lung = 0;
  substanceOnly species Atrans in Trans = 0;
  substanceOnly species Asc in Sc = 0;
  substanceOnly species Ave in Ve = 0;
  substanceOnly species ASk in Skin = 0;
  substanceOnly species AVen_Plas in Ven_Plas = 0;
  substanceOnly species AArt_Plas in Art_Plas = 0;
  substanceOnly species AG in Gut = 0;
  substanceOnly species AL in Liv = 0;
  substanceOnly species AF in Fat = 0;
  substanceOnly species AK in Kid = 0;
  substanceOnly species Afil in Fil = 0;
  substanceOnly species Adelay in Delay = 0;
  substanceOnly species Aurine in Urine = 0;
  substanceOnly species AR in Rest = 0;

  // Parameters:
  BW = 70 KiloGM;
  QCC = 300 L_PER_DAY_KiloGM3DIV4;
  QFC = 0.052;
  QLC = 0.069;
  QKC = 0.175;
  QSkC = 0.058;
  QGC = 0.181;
  VLC = 0.026;
  VFC = 0.214;
  VKC = 0.004;
  VfilC = 0.0004;
  VGC = 0.0171;
  VlunC = 0.007;
  VPlasC = 0.0428;
  Htc = 0.44;
  Skinarea = 972 CentiM2;
  Skinthickness = 0.1 CentiM;
  fss = 0.005;
  hsurf = 0.01 CentiM;
  hsc = 0.0015 CentiM;
  hve = 0.01 CentiM;
  hcell = 5e-5 CentiM;
  ffatsc = 0.05;
  ffatve = 0.02;
  ffatepi = 0.02;
  ffatbl = 0.007;
  Kpcell = 0.93 CentiM_PER_HR;
  MW = 414.07 GM_PER_MOL;
  logP = 4.81;
  VP = 2.34;
  Tmc = 144000;
  Kt = 55;
  kurinec = 0.0072;
  Free = 0.02;
  Biotransformation = 0.003;
  PL = 2.2;
  PF = 0.04;
  PK = 1.05;
  PSk = 0.1;
  PR = 0.12;
  PG = 0.05;
  PLun = 1.27;
  Kpsc = 8.8e-5;
  Kpve = 8.8e-5;
  SkinTarea has CentiM2;
  VL has L;
  VF has L;
  VK has L;
  Vfil has L;
  VG has L;
  VPlas has L;
  VArt_Plas has L;
  VVen_Plas has L;
  VSk has L;
  Vlun has L;
  VR has L;
  Vsc has L;
  Vve has L;
  CLsc has L_PER_HR;
  CLve has L_PER_HR;
  CLcell has L_PER_HR;

  // Assignment rules:
  Lung := Vlun;
  Ve := Vve;
  Skin := VSk;
  Ven_Plas := VVen_Plas;
  Art_Plas := VArt_Plas;
  Gut := VG;
  Liv := VL;
  Fat := VF;
  Kid := VK;
  Fil := Vfil;
  Rest := VR;
  kurine := kurinec*BW^(-0.25);
  SkinTarea := 9.1*(BW*1000)^0.666;
  Kscve := (1 - ffatve + ffatve*10^logP)/(1 - ffatsc + ffatsc*10^logP);
  Kver := (1 - ffatbl + ffatbl*10^logP)/(1 - ffatepi + ffatepi*10^logP);
  Pab := 1/10^(6.96 - 1.04*log10(VP) - 0.533*logP - 0.00495*MW);
  FreeL := Free/PL;
  FreeF := Free/PF;
  FreeK := Free/PK;
  FreeSk := Free/PSk;
  FreeR := Free/PR;
  FreeG := Free/PG;
  FreeLun := Free/PLun;
  QC := QCC*BW^0.75;
  QCP := QC*(1 - Htc);
  QL := QLC*QCP;
  QF := QFC*QCP;
  QK := QKC*QCP;
  Qfil := 0.2*QK;
  QG := QGC*QCP;
  QSk := QSkC*QCP;
  QR := QCP - QL - QF - QK - QG - QSk;
  Qbal := QCP - (QR + QL + QF + QK + QG + QSk);
  VL := VLC*BW;
  VF := VFC*BW;
  VK := VKC*BW;
  Vfil := VfilC*BW;
  VG := VGC*BW;
  VPlas := VPlasC*BW;
  VArt_Plas := 0.39*VPlas;
  VVen_Plas := 0.61*VPlas;
  VSk := Skinarea*Skinthickness/1000;
  Vlun := VlunC*BW;
  VR := 0.84*BW - VL - VF - VK - Vfil - VG - VPlas - VSk - Vlun;
  VT := 0.007*BW;
  VFRC := 0.03*BW;
  Valv := VFRC + 0.5*VT;
  Vbal := 0.84*BW - (VL + VF + VK + Vfil + VG + VPlas + VSk + Vlun);
  Vsurf := fss*SkinTarea*hsurf/1000;
  Vsc := fss*SkinTarea*hsc/1000;
  Vve := fss*SkinTarea*hve/1000;
  Tm := Tmc*BW^0.75;
  CLsc := 24*Kpsc*fss*SkinTarea/1000;
  CLve := 24*Kpve*fss*SkinTarea/1000;
  CLcell := 24*Kpcell*fss*SkinTarea/1000;

  // Reactions:
  _J0: Asc -> Atrans; 2*CLsc*(Asc/Vsc);
  _J1: Atrans -> Ave; 2*CLve*(Atrans/1e-7/Kscve);
  _J2: Atrans -> Asc; 2*CLsc*(Atrans/1e-7);
  _J3: Ave -> Atrans; 2*CLve*(Ave/Vve);
  _J4: Ave -> ASk; CLcell*(Ave/Vve)/Kver;
  _J5: Alung -> AArt_Plas; QCP*(Alung/(Valv*Pab + Vlun));
  _J6: AArt_Plas -> AG; QG*(AArt_Plas/VArt_Plas);
  _J7: AArt_Plas -> AL; QL*(AArt_Plas/VArt_Plas);
  _J8: AArt_Plas -> AF; QF*(AArt_Plas/VArt_Plas);
  _J9: AArt_Plas -> AK; QK*(AArt_Plas/VArt_Plas);
  _J10: AArt_Plas -> Afil; Qfil*(AArt_Plas/VArt_Plas);
  _J11: AArt_Plas -> AR; QR*(AArt_Plas/VArt_Plas);
  _J12: AArt_Plas -> ASk; QSk*(AArt_Plas/VArt_Plas);
  _J13: AG -> AL; QG*FreeG*(AG/VG);
  _J14: Afil -> AK; Tm*(Afil/Vfil)/(Kt + Afil/Vfil);
  _J15: Afil -> Adelay; Qfil*(Afil/Vfil);
  _J16: Adelay -> Aurine; kurine*Adelay;
  _J17: AL -> AVen_Plas; (QL + QG)*FreeL*(AL/VL);
  _J18: AF -> AVen_Plas; QF*FreeF*(AF/VF);
  _J19: AK -> AVen_Plas; QK*FreeK*(AK/VK);
  _J20: AR -> AVen_Plas; QR*FreeR*(AR/VR);
  _J21: ASk -> AVen_Plas; QSk*FreeSk*(ASk/VSk);
  _J22: AVen_Plas -> Alung; QCP*(AVen_Plas/VVen_Plas);

  // Unit definitions:
  unit MicroGM = 1e-6 gram;
  unit DAY = 86400 second;
  unit L = litre;
  unit KiloGM = 1000 gram;
  unit L_PER_DAY_KiloGM3DIV4 = litre / (864000 second * (1000 gram)^0.75);
  unit CentiM2 = (0.01 metre)^2;
  unit CentiM = 0.01 metre;
  unit CentiM_PER_HR = 0.01 metre / (36000 second);
  unit GM_PER_MOL = gram / mole;
  unit L_PER_HR = litre / (36000 second);
end
