// SBML level 3 version 2

model PBK_PFAS()
  // model units - substance: MicroGM, time: DAY, volume: L

  // Compartments:
  compartment Lung; Lung has L; Lung is "lung";
  compartment Trans = 1e-7 L; Trans is "transfer compartment";
  compartment Sc = 1 L; Sc is "stratum corneum";
  compartment Ve; Ve has L; Ve is "viable epidermis";
  compartment Skin; Skin has L; Skin is "skin";
  compartment Ven_Plas; Ven_Plas has L; Ven_Plas is "venous blood";
  compartment Art_Plas; Art_Plas has L; Art_Plas is "arterial blood";
  compartment Gut; Gut has L; Gut is "gut";
  compartment Liv; Liv has L; Liv is "liver";
  compartment Fat; Fat has L; Fat is "adipose tissue";
  compartment Kid; Kid has L; Kid is "kidney";
  compartment Fil; Fil has L; Fil is "filtrate";
  compartment Delay = 1 L; Delay is "storage compartment of urine";
  compartment Urine = 1 L; Urine is "urine";
  compartment Rest; Rest has L; Rest is "rest-of-body";

  // Species:
  substanceOnly species Alung in Lung = 0; Alung is "quantity in lung";
  substanceOnly species Atrans in Trans = 0; Atrans is "quantity in transfer compartment";
  substanceOnly species Asc in Sc = 0; Asc is "quantity in stratum corneum";
  substanceOnly species Ave in Ve = 0; Ave is "quantity in viable epidermis";
  substanceOnly species ASk in Skin = 0; ASk is "quantity in skin";
  substanceOnly species AVen_Plas in Ven_Plas = 0; AVen_Plas is "quantity in venous blood plasma";
  substanceOnly species AArt_Plas in Art_Plas = 0; AArt_Plas is "quantity in arterial blood plasma";
  substanceOnly species AG in Gut = 0; AG is "quantity in gut";
  substanceOnly species AL in Liv = 0; AL is "quantity in liver";
  substanceOnly species AF in Fat = 0; AF is "quantity in fat";
  substanceOnly species AK in Kid = 0; AK is "quantity in kidney";
  substanceOnly species Afil in Fil = 0; Afil is "quantity in filtrate";
  substanceOnly species Adelay in Delay = 0; Adelay is "quantity in delay";
  substanceOnly species Aurine in Urine = 0; Aurine is "quantity in urine";
  substanceOnly species AR in Rest = 0; AR is "quantity in rest-of-body";

  // Parameters:
  BW = 70 KiloGM; BW is "body weight";
  QCC = 300 L_PER_DAY_KiloGM3DIV4; QCC is "cardiac blood output";
  QFC = 0.052 UNITLESS; QFC is "fraction cardiac output going to fat";
  QLC = 0.069 UNITLESS; QLC is "fraction cardiac output going to liver";
  QKC = 0.175 UNITLESS; QKC is "fraction cardiac output going to kidney";
  QSkC = 0.058 UNITLESS; QSkC is "fraction cardiac output going to skin";
  QGC = 0.181 UNITLESS; QGC is "fraction of cardiac output going to gut and the liver via portal arthery";
  VLC = 0.026 UNITLESS; VLC is "fraction liver volume";
  VFC = 0.214 UNITLESS; VFC is "fraction fat volume";
  VKC = 0.004 UNITLESS; VKC is "fraction kidney volume";
  VfilC = 0.0004 UNITLESS; VfilC is "fraction filtrate compartment volume";
  VGC = 0.0171 UNITLESS; VGC is "fraction gut volume";
  VlunC = 0.007 UNITLESS; VlunC is "fraction lung volume";
  VPlasC = 0.0428 UNITLESS; VPlasC is "fraction plasma volume";
  VartC = 0.39;
  Htc = 0.44 UNITLESS; Htc is "hematocrit";
  Skinthickness = 0.1 CentiM; Skinthickness is "skin thickness";
  fss = 0.005 UNITLESS; fss is "fraction palm of hands";
  hsurf = 0.01 CentiM; hsurf is "applied layer thickness";
  hsc = 0.0015 CentiM; hsc is "stratum corneum thickness";
  hve = 0.01 CentiM; hve is "viable epidermis thickness";
  hcell = 5e-5 CentiM; hcell is "blood vessel wall thickness";
  ffatsc = 0.05 UNITLESS; ffatsc is "fraction of fat in stratum corneum";
  ffatve = 0.02 UNITLESS; ffatve is "fraction of fat in viable epidermis";
  ffatepi = 0.02 UNITLESS; ffatepi is "fraction of fat in epidermis";
  ffatbl = 0.007 UNITLESS; ffatbl is "fraction of fat in blood";
  Kpcell = 0.93 CentiM_PER_HR; Kpcell is "blood vessel wall thickness";
  MW = 414.07 GM_PER_MOL; MW is "molar weight";
  logP = 4.81 UNITLESS;
  VP = 2.34; VP is "vapor pressure";
  Tmc = 144000; Tmc is "maximum resorption rate";
  Kt = 55; Kt is "resorption affinity";
  kurinec = 0.0072; kurinec is "urinary elimination rate constant";
  Free = 0.02; Free is "free fraction in plasma";
  Biotransformation = 0.003; Biotransformation is "ratio of biotransformation";
  PL = 2.2 UNITLESS; PL is "partition coefficient liver/plasma";
  PF = 0.04 UNITLESS; PF is "partition coefficient fat/plasma";
  PK = 1.05 UNITLESS; PK is "partition coefficient kidney/plasma";
  PSk = 0.1 UNITLESS; PSk is "partition coefficient skin/plasma";
  PR = 0.12 UNITLESS; PR is "partition coefficient rest-of-body/plasma";
  PG = 0.05 UNITLESS; PG is "partition coefficient gut/plasma";
  PLun = 1.27 UNITLESS; PLun is "partition coefficient lung/plasma";
  Kpsc = 8.8e-5 CentiM_PER_HR; Kpsc is "permeability coefficient of stratum corneum";
  Kpve = 8.8e-5 CentiM_PER_HR; Kpve is "permeability coefficient of viable epidermis";
  kurine has PER_DAY; kurine is "urinary elimination rate constant";
  var Tm; Tm is "transporter maximum";
  SkinTarea has CentiM2; SkinTarea is "total area of the skin";
  Skinarea has CentiM2; Skinarea is "exposed area on skin";
  Kscve has UNITLESS; Kscve is "stratum corneum/viable epidermis partition coefficient";
  Kver has UNITLESS; Kver is "viable epidermis/blood partition coefficient";
  Pab has UNITLESS; Pab is "air/blood partition coefficient";
  FreeL has UNITLESS; FreeL is "free fraction of chemical in liver";
  FreeF has UNITLESS; FreeF is "free fraction of chemical in fat";
  FreeK has UNITLESS; FreeK is "free fraction of chemical in kidney";
  FreeSk has UNITLESS; FreeSk is "free fraction of chemical in skin";
  FreeR has UNITLESS; FreeR is "free fraction of chemical in rest of body";
  FreeG has UNITLESS; FreeG is "free fraction of chemical in gut";
  FreeLun has UNITLESS; FreeLun is "free fraction of chemical in lung";
  QC has L_PER_HR; QC is "cardiac output adjusted for body weight";
  QCP has L_PER_HR; QCP is "cardiac output adjusted for plasma flow";
  QL has L_PER_HR; QL is "scaled plasma flow to liver";
  QF has L_PER_HR; QF is "scaled plasma flow to fat";
  QK has L_PER_HR; QK is "scaled plasma flow to kidney";
  Qfil has L_PER_HR; Qfil is "plasma flow to filtrate compartment";
  QG has L_PER_HR; QG is "scaled plasma flow to gut";
  QSk has L_PER_HR; QSk is "scaled plasma flow to the skin";
  QR has L_PER_HR; QR is "plasma flow to the rest of the body";
  VL has L; VL is "liver volume";
  VF has L; VF is "fat volume";
  VK has L; VK is "kidney volume";
  Vfil has L; Vfil is "filtrate compartment volume";
  VG has L; VG is "gut volume";
  VPlas has L; VPlas is "plasma volume";
  VArt_Plas has L; VArt_Plas is "arterial blood plasma volume";
  VVen_Plas has L; VVen_Plas is "venous blood plasma volume";
  VSk has L; VSk is "skin volume";
  Vlun has L; Vlun is "lung volume";
  VR has L; VR is "rest-of-body volume";
  Vsc has L; Vsc is "stratum corneum volume";
  Vve has L; Vve is "viable epidermis corneum volume";
  Vsurf has L; Vsurf is "volume of dermal layer on exposed skin surface";
  VT has L; VT is "tidal volume";
  VFRC has L; VFRC is "functional residual capacity";
  Valv has L; Valv is "alveolar volume";
  CLsc has L_PER_HR; CLsc is "stratum corneum clearance";
  CLve has L_PER_HR; CLve is "viable epidermis clearance";
  CLcell has L_PER_HR; CLcell is "clearance from arterial wall into the blood compartment";

  // Assignment rules:
  Lung := Vlun;
  Ve := Vve;
  Skin := VSk;
  Ven_Plas := VVen_Plas;
  Art_Plas := VArt_Plas;
  Gut := VG;
  Liv := VL;
  Fat := VF;
  Kid := VK;
  Fil := Vfil;
  Rest := VR;
  VvenC := 1 - VartC;
  kurine := kurinec*BW^(-0.25);
  Tm := Tmc*BW^0.75;
  SkinTarea := 9.1*(BW*1000)^0.666;
  Skinarea := fss*SkinTarea;
  Kscve := (1 - ffatve + ffatve*10^logP)/(1 - ffatsc + ffatsc*10^logP);
  Kver := (1 - ffatbl + ffatbl*10^logP)/(1 - ffatepi + ffatepi*10^logP);
  Pab := 1/10^(6.96 - 1.04*log10(VP) - 0.533*logP - 0.00495*MW);
  FreeL := Free/PL;
  FreeF := Free/PF;
  FreeK := Free/PK;
  FreeSk := Free/PSk;
  FreeR := Free/PR;
  FreeG := Free/PG;
  FreeLun := Free/PLun;
  QC := QCC*BW^0.75;
  QCP := QC*(1 - Htc);
  QL := QLC*QCP;
  QF := QFC*QCP;
  QK := QKC*QCP;
  Qfil := 0.2*QK;
  QG := QGC*QCP;
  QSk := QSkC*QCP;
  QR := QCP - QL - QF - QK - QG - QSk;
  VL := VLC*BW;
  VF := VFC*BW;
  VK := VKC*BW;
  Vfil := VfilC*BW;
  VG := VGC*BW;
  VPlas := VPlasC*BW;
  VArt_Plas := VartC*VPlas;
  VVen_Plas := VvenC*VPlas;
  VSk := Skinarea*Skinthickness/1000;
  Vlun := VlunC*BW;
  VR := 0.84*BW - VL - VF - VK - Vfil - VG - VPlas - VSk - Vlun;
  Vsc := fss*SkinTarea*hsc/1000;
  Vve := fss*SkinTarea*hve/1000;
  Vsurf := fss*SkinTarea*hsurf/1000;
  VT := 0.007*BW;
  VFRC := 0.03*BW;
  Valv := VFRC + 0.5*VT;
  CLsc := 24*Kpsc*fss*SkinTarea/1000;
  CLve := 24*Kpve*fss*SkinTarea/1000;
  CLcell := 24*Kpcell*fss*SkinTarea/1000;

  // Reactions:
  _J0: Asc -> Atrans; 2*CLsc*(Asc/Vsc);
  _J1: Atrans -> Ave; 2*CLve*(Atrans/1e-7/Kscve);
  _J2: Atrans -> Asc; 2*CLsc*(Atrans/1e-7);
  _J3: Ave -> Atrans; 2*CLve*(Ave/Vve);
  _J4: Ave -> ASk; CLcell*(Ave/Vve)/Kver;
  _J5: Alung -> AArt_Plas; QCP*Free*(Alung/(Valv*Pab + Vlun));
  _J6: AArt_Plas -> AG; QG*Free*(AArt_Plas/VArt_Plas);
  _J7: AArt_Plas -> AL; QL*Free*(AArt_Plas/VArt_Plas);
  _J8: AArt_Plas -> AF; QF*Free*(AArt_Plas/VArt_Plas);
  _J9: AArt_Plas -> AK; QK*Free*(AArt_Plas/VArt_Plas);
  _J10: AArt_Plas -> Afil; Qfil*Free*(AArt_Plas/VArt_Plas);
  _J11: AArt_Plas -> AR; QR*Free*(AArt_Plas/VArt_Plas);
  _J12: AArt_Plas -> ASk; QSk*Free*(AArt_Plas/VArt_Plas);
  _J13: AG -> AL; QG*FreeG*(AG/VG);
  _J14: Afil -> AK; Tm*(Afil/Vfil)/(Kt + Afil/Vfil);
  _J15: Afil -> Adelay; Qfil*(Afil/Vfil);
  _J16: Adelay -> Aurine; kurine*Adelay;
  _J17: AL -> AVen_Plas; (QL + QG)*FreeL*(AL/VL);
  _J18: AF -> AVen_Plas; QF*FreeF*(AF/VF);
  _J19: AK -> AVen_Plas; QK*FreeK*(AK/VK);
  _J20: AR -> AVen_Plas; QR*FreeR*(AR/VR);
  _J21: ASk -> AVen_Plas; QSk*FreeSk*(ASk/VSk);
  _J22: AVen_Plas -> Alung; QCP*Free*(AVen_Plas/VVen_Plas);

  // Unit definitions:
  unit MicroGM = 1e-6 gram;
  unit DAY = 86400 second;
  unit L = litre;
  unit KiloGM = 1000 gram;
  unit L_PER_DAY_KiloGM3DIV4 = litre / (86400 second * (1000 gram)^0.75);
  unit UNITLESS = dimensionless;
  unit CentiM2 = (0.01 metre)^2;
  unit CentiM = 0.01 metre;
  unit CentiM_PER_HR = 0.01 metre / (3600 second);
  unit GM_PER_MOL = gram / mole;
  unit PER_DAY = 1 / (86400 second);
  unit L_PER_HR = litre / (3600 second);
end
